// COMSOL Multiphysics 5.1.0.234 model "Baby_Piet_V4_200um_Pitch_500um_Hole_200um_nosolutions.mph"
// Outline of the model tree

Parameters
  h_kapton = 200[um]  // height of kapton layer
  h_dlc = 100[nm]  // height of dlc layer
  r_curvature = 1[um]  // curvature to round sharp edges
  h_drift = 1000[um]  // height of drift layer
  h_det = h_kapton+h_dlc+h_drift  // total height of detector
  hole_top = 200[um]  // hole width at top
  hole_bot = 200[um]  // hole width at bottom
  pitch = 500[um]  // pitch (length of 1 unit: 1 well + 1 hole)
  w_top = pitch-hole_top  // top width of well
  w_bot = pitch-hole_bot  // bottom width of well
  w_det = 4*pitch  // total length of detector
  delta_dlc = h_dlc*(w_top-w_bot)/2/(h_dlc+h_kapton)  // difference between width of well at top of dlc coating and bottom of dlc coating, one one side only
  E_amp = 60[kV/cm]  // Amplification Field
  E_drift = 4[kV/cm]  // Drift Field
  V_mesh = -E_amp*h_kapton  // amplification voltage
  V_drift = V_mesh-E_drift*h_drift  // drift voltage
  Korff_A_Ar = 14[torr^-1][cm^-1]  // Korff Approx coeff A for Argon
  Korff_A_CO2 = 20[torr^-1][cm^-1]  // Korff Approx coeff A for CO2
  Korff_B_Ar = 180[V][cm^-1][torr^-1]  // Korff Approx coeff B for Ar
  Korff_B_CO2 = 466[V][cm^-1][torr^-1]  // Korff Approx coeff B for CO2
  Korff_A_Ar_70_CO2_30 = 0.7*Korff_A_Ar+0.3*Korff_A_CO2  // Korff Approx coeff A for Ar/CO2 70:30
  Korff_B_Ar_70_CO2_30 = 0.7*Korff_B_Ar+0.3*Korff_B_CO2  // Korff Approx coeff B for Ar/CO2 70:30
  P = 101325[Pa]  // Atmospheric Pressure
  P_CERN = 98000[Pa]
  P_BARI = 101325[Pa]
  Korff_A_Garfield_CERN = 7.96205[m^-1][Pa^-1]  // New Korff Approx Fit for A (CERN Pressure 980mbar)
  Korff_B_Garfield_CERN = 155.637[V][m^-1][Pa^-1]  // New Korff Approx Fit for B (CERN Pressure 980mbar)
  Korff_A_Garfield_BARI = 5.62108[m^-1][Pa^-1]
  Korff_B_Garfield_BARI = 116.036[V][m^-1][Pa^-1]
  Korff_A_Garfield_CERN_L = 3.88[m^-1][Pa^-1]  // New Korff Approx Fit for A (CERN Pressure 980mbar)
  Korff_B_Garfield_CERN_L = 101.50[V][m^-1][Pa^-1]  // New Korff Approx Fit for B (CERN Pressure 980mbar)
  Korff_A_Garfield_CERN_H = 8.05[m^-1][Pa^-1]
  Korff_B_Garfield_CERN_H = 157.22[V][m^-1][Pa^-1]
  Korff_A_Garfield_BARI_L = 3.58[m^-1][Pa^-1]
  Korff_B_Garfield_BARI_L = 98.00[V][m^-1][Pa^-1]
  Korff_A_Garfield_BARI_H = 7.93[m^-1][Pa^-1]
  Korff_B_Garfield_BARI_H = 155.48[V][m^-1][Pa^-1]
  Korff_A_Garfield_linear_a_L = -1.93E-5[m^-1][Pa^-2]
  Korff_A_Garfield_linear_b_L = 5.71[m^-1][Pa^-1]
  Korff_B_Garfield_linear_a_L = -2.06E-4[V][m^-1][Pa^-2]
  Korff_B_Garfield_linear_b_L = 120.57[V][m^-1][Pa^-1]
  Korff_A_Garfield_linear_a_H = -6.39E-5[m^-1][Pa^-2]
  Korff_A_Garfield_linear_b_H = 14.26[m^-1][Pa^-1]
  Korff_B_Garfield_linear_a_H = -9.00E-4[V][m^-1][Pa^-2]
  Korff_B_Garfield_linear_b_H = 244.19[V][m^-1][Pa^-1]

Functions
  an1: Analytic "TownsendCoefficient SAULI" | funcname = eta1; expr = Korff_A_Ar_70_CO2_30*P*exp(-Korff_B_Ar_70_CO2_30*P/es.normE); args = es.normE; fununit = m^-1
  an2: Analytic "TownsendCoefficient CERN Old" | funcname = eta2old; expr = Korff_A_Garfield_CERN*P_CERN*exp(-Korff_B_Garfield_CERN*P_CERN/es.normE); args = es.normE; fununit = m^-1
  an4: Analytic "TownsendCoefficient BARI Old" | funcname = eta3old; expr = Korff_A_Garfield_BARI*P_BARI*exp(-Korff_B_Garfield_BARI*P_BARI/es.normE); args = es.normE; fununit = m^-1
  pw1: Piecewise "TownsendCoefficient CERN"
    funcname = eta2
    arg = es.normE
    smooth = contd1
    zonelengthtype = relative
    pieces = 
      {0, 7E6, Korff_A_Garfield_CERN_L*P_CERN*exp(-Korff_B_Garfield_CERN_L*P_CERN/es.normE)}
      {7E6, 20E6, Korff_A_Garfield_CERN_H*P_CERN*exp(-Korff_B_Garfield_CERN_H*P_CERN/es.normE)}
    fununit = m^-1
  pw2: Piecewise "TownsendCoefficient BARI"
    funcname = eta3
    arg = es.normE
    smooth = contd1
    pieces = 
      {0, 7E6, Korff_A_Garfield_BARI_L*P_BARI*exp(-Korff_B_Garfield_BARI_L*P_BARI/es.normE)}
      {7E6, 20E6, Korff_A_Garfield_BARI_H*P_BARI*exp(-Korff_B_Garfield_BARI_H*P_BARI/es.normE)}
    fununit = m^-1
  an5: Analytic "Korff_A_linear_L" | funcname = korff1; expr = Korff_A_Garfield_linear_a_L*P+Korff_A_Garfield_linear_b_L; args = P
  an6: Analytic "Korff_B_linear_L" | funcname = korff2; expr = Korff_B_Garfield_linear_a_L*P+Korff_B_Garfield_linear_b_L; args = P
  an7: Analytic "Korff_A_linear_H" | funcname = korff3; expr = Korff_A_Garfield_linear_a_H*P+Korff_A_Garfield_linear_b_H; args = P
  an8: Analytic "Korff_B_linear_H" | funcname = korff4; expr = Korff_B_Garfield_linear_a_H*P+Korff_B_Garfield_linear_b_H; args = P
  pw4: Piecewise "TownsendCoefficient pscan"
    funcname = eta6
    arg = es.normE
    smooth = contd1
    zonelengthtype = relative
    pieces = 
      {0, 7E6, (Korff_A_Garfield_linear_a_L*P+Korff_A_Garfield_linear_b_L)*P*exp(-(Korff_B_Garfield_linear_a_L*P+Korff_B_Garfield_linear_b_L)*P/es.normE)}
      {7E6, 20E6, (Korff_A_Garfield_linear_a_H*P+Korff_A_Garfield_linear_b_H)*P*exp(-(Korff_B_Garfield_linear_a_H*P+Korff_B_Garfield_linear_b_H)*P/es.normE)}
  int3: Interpolation "Interpolation Townsend CERN"
    funcname = eta4
    table = 
      {2000000, 3221.12}
      {2500000, 7936.53}
      {3000000, 14318.1}
      {3500000, 22080.7}
      {4000000, 30769.7}
      {4500000, 40451.9}
      {5000000, 50576.7}
      {5500000, 61429.5}
      {6000000, 72301.8}
      {6500000, 83540.2}
      {7000000, 95154.2}
      {8000000, 118709}
      {9000000, 142834}
      {10000000, 166904}
      {11000000, 190965}
      {12000000, 215364}
      {13000000, 239004}
      {14000000, 262698}
      {15000000, 285934}
      {16000000, 309521}
    interp = cubicspline
    fununit = m^-1
  int4: Interpolation "Interpolation Townsend BARI"
    funcname = eta5
    table = 
      {2000000, 2833.2}
      {2500000, 7277.72}
      {3000000, 13448.6}
      {3500000, 20872.1}
      {4000000, 29384.8}
      {4500000, 38963}
      {5000000, 48940.1}
      {5500000, 59217.5}
      {6000000, 70231.1}
      {6500000, 81555.1}
      {7000000, 92755.6}
      {8000000, 116389}
      {9000000, 140199}
      {10000000, 164115}
      {11000000, 188373}
      {12000000, 212501}
      {13000000, 236275}
      {14000000, 260131}
      {15000000, 284002}
      {16000000, 307656}
    interp = cubicspline
    fununit = m^-1

Couplings
  intop1: Integration on boundaries 14

Probes
  pdom1: DomainPoint "ElectricField_atWellCenter"
    ppb1: PointExpr "Point Probe Expression 1" | expr = es.normE; unit = V/m; descr = Electric field; table = tbl1
  pdom2: DomainPoint "Townsend_atWellCenter"
    ppb2: PointExpr "Point Probe Expression 2" | expr = eta1(es.normE); descr = eta(es.normE); table = tbl1
  pdom3: DomainPoint "LogGain_atWellCenter"
    ppb3: PointExpr "Point Probe Expression 3"
      expr = integrate(eta1(es.normE),y,y,50E-6)/log(10)
      descr = Log Gain
      table = tbl1
  pdom4: DomainPoint "Gain_atWellCenter"
    ppb4: PointExpr "Point Probe Expression 4"
      expr = exp(integrate(eta1(es.normE),y,y,50E-6))
      descr = Gain
      table = tbl1

Geometry
  geom1 "Geometry 1" (2D, length unit m)
    r1: Rectangle "detector volume" | size = {w_det, h_det}
    b1: BezierPolygon "overall envelope of well"
      p = 
        {hole_top/2+(w_top-w_bot)/2, hole_top/2+(w_top+w_bot)/2, hole_top/2+w_top, hole_top/2, hole_top/2+(w_top-w_bot)/2}
        {0, 0, h_kapton, h_kapton, 0}
      degree = {1, 1, 1, 1}
      w = {1, 1, 1, 1, 1, 1, 1, 1}
    b2: BezierPolygon "envelope of dlc"
      p = 
        {hole_top/2+1.33*r_curvature, hole_top/2+w_top-1.33*r_curvature, hole_top/2+w_top-1.33*r_curvature, hole_top/2+1.33*r_curvature, hole_top/2+1.33*r_curvature}
        {h_kapton, h_kapton, h_kapton+h_dlc, h_kapton+h_dlc, h_kapton}
      degree = {1, 1, 1, 1}
      w = {1, 1, 1, 1, 1, 1, 1, 1}
    fil1: Fillet (disabled) | point = b1(1) entities 2, 4; b2(1) entities 1-4; radius = r_curvature
      prob1: GeomError "Error 1"
        error: GeomError
    arr1: Array | input = b1(1), b2(1); size = {4, 1}; displ = {pitch, 0}
    b3: BezierPolygon "Bézier Polygon 3" | p = {{pitch, pitch}, {0, h_det}}; degree = 1; w = {1, 1}
    fin: Finalize "Form Union"
  pgeom_cpt "Geometry" (1D, length unit m)
    pt1: Point

Materials
  mat1: Common "Air" on domains 1, 4
    def "Basic"
      relpermeability = 1
      relpermittivity = 1
      dynamicviscosity = eta(T[1/K])[Pa*s]
      ratioofspecificheat = 1.4
      electricconductivity = 0[S/m]
      heatcapacity = Cp(T[1/K])[J/(kg*K)]
      density = rho(pA[1/Pa],T[1/K])[kg/m^3]
      thermalconductivity = k(T[1/K])[W/(m*K)]
      soundspeed = cs(T[1/K])[m/s]
      eta: Piecewise | arg = T; pieces = {200.0, 1600.0, -8.38278E-7+8.35717342E-8*T^1-7.69429583E-11*T^2+4.6437266E-14*T^3-1.06585607E-17*T^4}
      Cp: Piecewise | arg = T; pieces = {200.0, 1600.0, 1047.63657-0.372589265*T^1+9.45304214E-4*T^2-6.02409443E-7*T^3+1.2858961E-10*T^4}
      rho: Analytic | expr = pA*0.02897/8.314/T; args = {pA, T}; dermethod = manual; argders = {{pA, d(pA*0.02897/8.314/T,pA)}, {T, d(pA*0.02897/8.314/T,T)}}
      k: Piecewise | arg = T; pieces = {200.0, 1600.0, -0.00227583562+1.15480022E-4*T^1-7.90252856E-8*T^2+4.11702505E-11*T^3-7.43864331E-15*T^4}
      cs: Analytic | expr = sqrt(1.4*287*T); args = T; dermethod = manual; argders = {T, d(sqrt(1.4*287*T),T)}
    RefractiveIndex
      n = 1
      ki = 0
  mat2: Common "Copper" on domains 3, 6, 8, 10
    def "Basic"
      relpermeability = 1
      electricconductivity = 5.998e7[S/m]
      thermalexpansioncoefficient = 17e-6[1/K]
      heatcapacity = 385[J/(kg*K)]
      relpermittivity = 1
      density = 8700[kg/m^3]
      thermalconductivity = 400[W/(m*K)]
    Enu "Young's modulus and Poisson's ratio"
      youngsmodulus = 110e9[Pa]
      poissonsratio = 0.35
    linzRes "Linearized resistivity"
      rho0 = 1.72e-8[ohm*m]
      alpha = 0.0039[1/K]
      Tref = 298[K]
  mat3: Common "Polyimide" on no domains
    def "Basic"
      heatcapacity = 1100[J/(kg*K)]
      density = 1300[kg/m^3]
      thermalconductivity = 0.15[W/(m*K)]
    Enu "Young's modulus and Poisson's ratio"
      youngsmodulus = 3.1e9[Pa]
  mat4: Common "Polyimide tape (Kapton H) [solid]" on domains 2, 5, 7, 9
    def "Basic"
      thermalconductivity = k(T[1/K])[W/(m*K)]
      heatcapacity = C(T[1/K])[J/(kg*K)]
      relpermittivity = 4
      k: Piecewise | arg = T; pieces = {5.0, 400.0, -1.82146E-15+0.0027*T^1}
      C: Piecewise
        arg = T
        pieces = 
          {4.0, 30.0, 2.809666-1.394349*T^1+0.2106639*T^2+0.004752016*T^3-3.279998E-4*T^4+4.282249E-6*T^5}
          {30.0, 300.0, -86.86946+7.816917*T^1-0.03664788*T^2+9.9128E-5*T^3-1.08441E-7*T^4}
  mat5: Common "FR-4 (PWB) [solid,in-plane]" on domains 2, 5, 7, 9
    def "Basic"
      dL = (dL_solid_in_plane_1(T[1/K])-dL_solid_in_plane_1(Tempref[1/K]))/(1+dL_solid_in_plane_1(Tempref[1/K]))
      CTE = CTE_solid_in_plane_1(T[1/K])[1/K]
      thermalconductivity = k_solid_in_plane_1(T[1/K])[W/(m*K)]
      thermalexpansioncoefficient = (alpha_solid_in_plane_1(T[1/K])[1/K]+(Tempref-293[K])*if(abs(T-Tempref)>1e-3,(alpha_solid_in_plane_1(T[1/K])[1/K]-alpha_solid_in_plane_1(Tempref[1/K])[1/K])/(T-Tempref),d(alpha_solid_in_plane_1(T[1/K]),T)[1/K]))/(1+alpha_solid_in_plane_1(Tempref[1/K])[1/K]*(Tempref-293[K]))
      heatcapacity = C(T[1/K])[J/(kg*K)]
      density = rho(T[1/K])[kg/m^3]
      relpermittivity = 4.5
      dL_solid_in_plane_1: Piecewise | arg = T; extrap = constant; pieces = {293.0, 543.0, -0.00586+2.0E-5*T^1}
      CTE_solid_in_plane_1: Piecewise "Piecewise 1a" | arg = T; extrap = constant; pieces = {293.0, 543.0, 2.0E-5}
      k_solid_in_plane_1: Piecewise "Piecewise 1b" | arg = T; extrap = constant; pieces = {293.0, 353.0, 1.06}
      alpha_solid_in_plane_1: Piecewise "Piecewise 1c" | arg = T; extrap = constant; pieces = {293.0, 543.0, 2.0E-5}
      C: Piecewise | arg = T; extrap = constant; pieces = {293.0, 543.0, 840.0008}
      rho: Piecewise | arg = T; extrap = constant; pieces = {293.0, 303.0, 1220.0}
    Enu "Young's modulus and Poisson's ratio"
      youngsmodulus = E_solid_in_plane_1(T[1/K])[Pa]
      poissonsratio = nu_solid_in_plane_1(T[1/K])
      E_solid_in_plane_1: Piecewise
        arg = T
        extrap = constant
        pieces = 
          {293.0, 423.0, -2.761046E10+4.241352E8*T^1-1113223.0*T^2+863.025*T^3}
          {423.0, 543.0, 5.404715E10-1.394333E8*T^1+127777.8*T^2}
      nu_solid_in_plane_1: Piecewise "Piecewise 1a" | arg = T; extrap = constant; pieces = {293.0, 543.0, 0.2}
    KG "Bulk modulus and shear modulus"
      K = 1
      G = mu_solid_in_plane_1(T[1/K])[Pa]
      mu_solid_in_plane_1: Piecewise
        arg = T
        extrap = constant
        pieces = 
          {293.0, 423.0, 3.028084E9-2.23396E7*T^1+71105.12*T^2-77.30053*T^3}
          {423.0, 543.0, 4.81725E8-75000.0*T^1}

Physics
  es: Electrostatics on all domains
    dependent variable V
    ccn1: ChargeConservation (default)
    zc1: ZeroCharge (default)
    init1: init "Initial Values 1" (default)
    pot1: ElectricPotential "Electric Potential on DLC" on boundaries 6-11, 19-24, 29-34, 39-44 | V0 = V_mesh
    gnd1: Ground on boundaries 2, 5, 13, 15, 18, 26, 28, 36, 38, 46
    pot2: ElectricPotential "Electric Potential on Drift" on boundaries 3, 16 | V0 = V_drift
    pc1: PeriodicCondition "Periodic Condition Left-Right" on boundaries 1, 47
  cpt: ChargedParticleTracing on all domains
    dependent variable q = {qx, qy, qz}
    wall1: Wall (default)
    pp1: ParticleProperties | SpecifyHamiltonian = Directly; mp = me_const; mprest = me_const; Z = -1
    inl1: Inlet on boundaries 3, 16
      InitialPosition = UniformDistribution
      N = 50
      RefinementFactor = 1
      InitialVelocity = KineticEnergyAndDirection
      SpecifyInletTangentialNormal = 1
      L0 = {0, 1, 0}
    ef1: ElectricForce on domains 1, 4 | MultiplyForceByPhaseAngle = 0; E_src = root.comp1.es.Ex

Mesh
  mesh1 "Mesh 1"
    size: MeshSizeDefault | hmax = 1.34E-4; hmin = 6.0E-7; hcurve = 0.3; hnarrow = 1; hgrad = 1.3; hauto = 5
    ftri1: FreeTri "Free Triangular 1" on remaining entities
      size1: Size on boundaries 14 | hauto = 1; custom = off

Studies
  std1 "Study 1"
    param: Parametric "Parametric Sweep E-Field" | pname = E_amp; plistarr = range(2E6,1E6,12E6); punit = V/m
    stat: Stationary | physselection = es; solve for = {es}
  std2 "Study 2"
    param3: Parametric "Parametric Sweep Hole width"
      pname = {hole_top, hole_bot}
      plistarr = {range(50,50,200), range(50,50,200)}
      punit = {um, um}
    stat: Stationary | physselection = es; solve for = {es}
  std3 "Study 3"
    time: Transient "Time Dependent"
      tlist = range(0,1E-5,15E-4)
      rtol = 1E-3
      solve for = {cpt}
      useinitsol = on
      initmethod = sol
      initstudy = std1
      initsol = sol1
      usesol = on
      notsolmethod = sol
      notstudy = std1
      notsol = sol1

Solver configurations
  sol1 "Solution 1" (study std1)
    v1: Variables "Dependent Variables 1"
    s1: Stationary "Stationary Solver 1"
      dDef: Direct
      p1: Parametric
        sweeptype = sparse
        pname = E_amp
        plistarr = range(2E6,1E6,12E6)
        punit = V/m
        pcontinuationmode = no
      fc1: FullyCoupled | linsolver = dDef
  sol2 "Parametric Solutions 1" (study std1)
  sol5 "Parametric Solutions 2" (study std1)
  sol11 "Solution 11" (study std2)
    v1: Variables "Dependent Variables 1"
    s1: Stationary "Stationary Solver 1"
      dDef: Direct
      fc1: FullyCoupled | linsolver = dDef
  sol12 "Parametric Solutions 3" (study std2)
  sol17 "Solution 17" (study std3)
    v1: Variables "Dependent Variables 1"
    t1: Time "Time-Dependent Solver 1"
      tlist = range(0,1E-5,15E-4)
      rtol = 1E-3
      atolglobalmethod = scaled
      atolglobal = 1.0E-6
      timemethod = genalpha
      estrat = exclude
      tstepsgenalpha = strict
      fc1: FullyCoupled | linsolver = i1; jtech = once
      i1: Iterative | linsolver = gmres
        ja1: Jacobi

Datasets
  dset1: Solution on domains 1, 4 | solution = sol1
  cln1: CutLine2D | data = dset1; genpoints = {{0, 5E-5}, {2E-3, 5E-5}}
  cln2: CutLine2D | data = dset1; genpoints = {{0, 4E-5}, {2E-3, 4E-5}}
  cln3: CutLine2D | data = dset1; genpoints = {{0, 3E-5}, {2E-3, 3E-5}}
  cln4: CutLine2D | data = dset1; genpoints = {{0, 2E-5}, {2E-3, 2E-5}}
  cln5: CutLine2D | data = dset1; genpoints = {{0, 1E-5}, {2E-3, 1E-5}}
  cln6: CutLine2D | data = dset1; genpoints = {{0.0, 0}, {2E-3, 0}}
  cln7: CutLine2D | data = dset1; genpoints = {{5E-4, 0}, {5E-4, 12E-4}}
  cln8: CutLine2D | data = dset1; genpoints = {{5.1E-4, 0}, {5.1E-4, 3.02E-3}}
  cln9: CutLine2D | data = dset1; genpoints = {{5.2E-4, 0}, {5.2E-4, 3.02E-3}}
  cln10: CutLine2D | data = dset1; genpoints = {{5.3E-4, 0}, {5.3E-4, 3.02E-3}}
  cln11: CutLine2D | data = dset1; genpoints = {{5.4E-4, 0}, {5.4E-4, 3.02E-3}}
  cln12: CutLine2D | data = dset1; genpoints = {{5.5E-4, 0}, {5.5E-4, 3.02E-3}}
  cln13: CutLine2D "WellCenter_0_300um" | data = dset1; genpoints = {{500E-6, 0}, {500E-6, 300E-6}}
  cln14: CutLine2D "WellCenter_0_50um" | data = dset1; genpoints = {{5E-4, 0}, {5E-4, 50E-6}}
  cpt3: CutPoint2D "LogGain_atWellCenter" | data = dset2; pointx = 140[um]
  dset2: Solution "Probe Solution 2" | solution = sol1
  cpt4: CutPoint2D "ElectricField_atWellCenter" | data = dset2; pointx = 140[um]
  cpt5: CutPoint2D "Townsend_atWellCenter" | data = dset2; pointx = 140[um]
  cpt6: CutPoint2D "Gain_atWellCenter" | data = dset2; pointx = 1.4E-4
  an5_ds1: Grid1D | source = function; function = an5; par1 = P; parmin1 = 0; parmax1 = 1
  dset3: Solution | solution = sol2
  pw1_ds1: Grid1D "Grid 1D 1b" | source = function; function = all; par1 = es.normE; parmin1 = 0; parmax1 = 20000000
  pw1_ds2: Grid1D "Grid 1D 2a" | source = function; function = all; par1 = es.normE; parmin1 = -2000000; parmax1 = 0
  pw1_ds3: Grid1D "Grid 1D 3a"
    source = function
    function = all
    par1 = es.normE
    parmin1 = 20000000
    parmax1 = 22000000
  int3_ds1: Grid1D "Grid 1D 1a" | source = function; function = int3; par1 = t; parmin1 = 2000000; parmax1 = 16000000
  ptds1: CutPoint1D
    data = int3_ds1
    pointx = 2000000.0 2500000.0 3000000.0 3500000.0 4000000.0 4500000.0 5000000.0 5500000.0 6000000.0 6500000.0 7000000.0 8000000.0 9000000.0 1.0E7 1.1E7 1.2E7 1.3E7 1.4E7 1.5E7 1.6E7
  int3_ds2: Grid1D | source = function; function = int3; par1 = t; parmin1 = 600000; parmax1 = 2000000
  int3_ds3: Grid1D | source = function; function = int3; par1 = t; parmin1 = 16000000; parmax1 = 17400000
  int4_ds1: Grid1D "Grid 1D 1c" | source = function; function = int4; par1 = t; parmin1 = 2000000; parmax1 = 16000000
  ptds2: CutPoint1D
    data = int4_ds1
    pointx = 2000000.0 2500000.0 3000000.0 3500000.0 4000000.0 4500000.0 5000000.0 5500000.0 6000000.0 6500000.0 7000000.0 8000000.0 9000000.0 1.0E7 1.1E7 1.2E7 1.3E7 1.4E7 1.5E7 1.6E7
  int4_ds2: Grid1D "Grid 1D 2b" | source = function; function = int4; par1 = t; parmin1 = 600000; parmax1 = 2000000
  int4_ds3: Grid1D "Grid 1D 3b" | source = function; function = int4; par1 = t; parmin1 = 16000000; parmax1 = 17400000
  pw2_ds1: Grid1D "Grid 1D 1d" | source = function; function = all; par1 = es.normE; parmin1 = 0; parmax1 = 20000000
  pw2_ds2: Grid1D "Grid 1D 2c" | source = function; function = all; par1 = es.normE; parmin1 = -2000000; parmax1 = 0
  pw2_ds3: Grid1D "Grid 1D 3c"
    source = function
    function = all
    par1 = es.normE
    parmin1 = 20000000
    parmax1 = 22000000
  dset4: Solution | solution = sol5
  dset5: Solution | solution = sol11
  dset6: Solution | solution = sol12
  cln15: CutLine2D | data = dset6; method = twopoint; genpoints = {{pitch, 0}, {pitch, h_det}}
  cln16: CutLine2D | data = dset6; method = twopoint; genpoints = {{pitch/2, 0}, {pitch/2, h_det}}
  dset7: Solution | solution = sol17
  part1: Particle
    solution = sol17
    pgeomspec = fromphysics
    pgeom = pgeom_cpt
    posdof = {comp1.qx, comp1.qy}
    physicsinterface = cpt

Derived values
  pev4: EvalPoint "Point Probe Expression 1" | data = cpt4; table = tbl1; expr = es.normE
  pev5: EvalPoint "Point Probe Expression 2" | data = cpt5; table = tbl1; expr = eta1(es.normE)
  pev3: EvalPoint "Point Probe Expression 3"
    data = cpt3
    table = tbl1
    expr = integrate(eta1(es.normE),y,y,50E-6)/log(10)
  pev6: EvalPoint "Point Probe Expression 4" | data = cpt6; table = tbl1; expr = exp(integrate(eta1(es.normE),y,y,50E-6))

Tables
  tbl1: Table
    E_amp | Electric field (V/m), Point Probe Expression 1 | eta(es.normE), Point Probe Expression 2 | Log Gain, Point Probe Expression 3 | Gain, Point Probe Expression 4
    2e+06 | 1.9683e+06 | 41.906 | 0.000909977 | 1.0021
    3e+06 | 2.9485e+06 | 1270.63 | 0.0275915 | 1.06559
    4e+06 | 3.9287e+06 | 7020.77 | 0.152454 | 1.42054
    5e+06 | 4.90889e+06 | 19601.2 | 0.425634 | 2.66461
    6e+06 | 5.88909e+06 | 38881.9 | 0.844309 | 6.98729
    7e+06 | 6.86928e+06 | 63433.7 | 1.37744 | 23.8476
    8e+06 | 7.84948e+06 | 91580.5 | 1.98864 | 97.4191
    9e+06 | 8.82967e+06 | 121864 | 2.64625 | 442.846
    1e+07 | 9.80987e+06 | 153164 | 3.32591 | 2117.93
    1.1e+07 | 1.07901e+07 | 184671 | 4.01007 | 10234.7
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
Plots
  pg1: PlotGroup2D "Electric Potential" | data = dset1; xlabel = x-coordinate; ylabel = y-coordinate
    surf1: Surface | expr = V
    str1: Streamline | expr = {es.Ex, es.Ey}
  pg2: PlotGroup2D "Electric Field" | data = dset1; xlabel = x-coordinate; ylabel = y-coordinate
    surf1: Surface | expr = sqrt(es.Ex*es.Ex+es.Ey*es.Ey+es.Ez*es.Ez); unit = V/m
    str1: Streamline on all boundaries | expr = {es.Ex, es.Ey}; selnumber = 500
  pg21: PlotGroup2D "Log Electric Field" | data = dset1; xlabel = x-coordinate; ylabel = y-coordinate
    surf1: Surface | expr = log(es.normE)/log(10); descr = Log(E)
    str1: Streamline on all boundaries | expr = {es.Ex, es.Ey}; selnumber = 500
  pg20: PlotGroup1D "Electric Potential 1D" | data = cln7
    lngr1: LineGraph | expr = V; xdata = expr; xdataexpr = y
  pg18: PlotGroup1D "Electric Field 1D" | data = cln7; xlabel = y-coordinate (m)
    lngr1: LineGraph | expr = es.normE; unit = V/m; descr = Electric field norm; xdata = expr; xdataexpr = y
  pg39: PlotGroup1D "Electric Field 1D Ey" | data = cln7; xlabel = y-coordinate (m)
    lngr1: LineGraph | expr = es.Ey; unit = V/m; descr = Electric field norm; xdata = expr; xdataexpr = y
  pg23: PlotGroup1D "Townsend Coefficient 1D CERN" | data = cln13
    lngr1: LineGraph
      data = cln7
      expr = eta2(es.normE)
      descr = Townsend Coefficient
      title = Townsend Coefficient (m^-1)
      xdata = expr
      xdataexpr = y
  pg24: PlotGroup1D "Log Gain 1D CERN" | data = cln13; title = Log(Gain)
    lngr1: LineGraph | expr = intop1(eta2(es.normE)*(dest(y)<y))/log(10); descr = Log Gain; xdata = expr; xdataexpr = y
  pg25: PlotGroup1D "Gain 1D CERN" | data = cln13; title = Gain
    lngr1: LineGraph | expr = exp(intop1(eta2(es.normE)*(dest(y)<y))); descr = Gain; xdata = expr; xdataexpr = y
  pg28: PlotGroup1D "Townsend Coefficient 1D BARI" | data = cln13
    lngr1: LineGraph
      data = cln7
      expr = eta3(es.normE)
      descr = Townsend Coefficient
      title = Townsend Coefficient (m^-1)
      xdata = expr
      xdataexpr = y
  pg29: PlotGroup1D "Log Gain 1D BARI" | data = cln13; title = Log(Gain)
    lngr1: LineGraph
      data = cln7
      expr = intop1(eta3(es.normE)*(dest(y)<y))/log(10)
      descr = Log Gain
      xdata = expr
      xdataexpr = y
  pg30: PlotGroup1D "Gain 1D BARI" | data = cln13; title = Gain
    lngr1: LineGraph | expr = exp(intop1(eta3(es.normE)*(dest(y)<y))); descr = Gain; xdata = expr; xdataexpr = y
  pg15: PlotGroup1D "Electric Field vs Vmesh" | data = cpt4
    ptgr1: PointGraph "Electric Field vs Vmesh" | data = cpt4; expr = es.normE; unit = V/m
  pg14: PlotGroup1D "Townsend Coeff vs Vmesh" | data = cpt5
    ptgr1: PointGraph "Townsend vs Vmesh" | data = cpt5; expr = eta1(es.normE)
  pg26: PlotGroup1D "Townsend Coeff vs Vmesh CERN" | data = cpt5
    ptgr1: PointGraph "Townsend vs Vmesh" | data = cpt5; expr = eta2(es.normE)
  pg27: PlotGroup1D "Townsend Coeff vs Vmesh BARI" | data = cpt5
    ptgr1: PointGraph "Townsend vs Vmesh" | data = cpt5; expr = eta3(es.normE)
  pg16: PlotGroup1D "Log Gain vs Vmesh" | data = cpt3
    ptgr1: PointGraph "Log Gain vs Vmesh"
      data = cpt3
      expr = intop1(eta1(es.normE)*(dest(y)<y))/log(10)
      descr = Log Gain
  pg17: PlotGroup1D "Gain vs Vmesh" | data = cpt6
    ptgr1: PointGraph "Gain vs Vmesh" | data = cpt6; expr = exp(intop1(eta1(es.normE)*(dest(y)<y))); descr = Gain
  pg31: PlotGroup1D "Gain vs Vmesh CERN" | data = cpt6
    ptgr1: PointGraph "Gain vs Vmesh" | data = cpt6; expr = exp(intop1(eta2(es.normE)*(dest(y)<y))); descr = Gain
  pg32: PlotGroup1D "Gain vs Vmesh BARI" | data = cpt6
    ptgr1: PointGraph "Gain vs Vmesh" | data = cpt6; expr = exp(intop1(eta3(es.normE)*(dest(y)<y))); descr = Gain
  pg36: PlotGroup1D "Townsend Coefficient Fnct CERN"
    data = none
    title = eta4(t) (m^-1)
    xlabel = Electric Field (V/m)
    ylabel = Townsend Coefficient (m^-1)
    plot1: LineGraph
      data = int3_ds1
      expr = eta4(root.t)
      xdata = expr
      xdataexpr = root.t
      legends = COMSOL Cubic Spline Interpolation
    ptplot1: PointGraph | data = ptds1; expr = eta4(root.t); xdata = expr; xdataexpr = root.t
    plot2: LineGraph "Left Extrapolation" | data = int3_ds2; expr = eta4(root.t); xdata = expr; xdataexpr = root.t
    plot3: LineGraph "Right Extrapolation" | data = int3_ds3; expr = eta4(root.t); xdata = expr; xdataexpr = root.t
    plot4: LineGraph | data = pw1_ds1; expr = eta2(root.es.normE); legends = ROOT Double Fit of Korff Approximation
    plot5: LineGraph "Right Extrapolation 2" | data = pw1_ds3; expr = eta2(root.es.normE)
    plot6: LineGraph "Left Extrapolation 2" | data = pw1_ds2; expr = eta2(root.es.normE)
  pg37: PlotGroup1D "Townsend Coefficient Fnct BARI"
    data = none
    title = eta5(t) (m^-1)
    xlabel = Electric Field (V/m)
    ylabel = Townsend Coefficient (m^-1)
    plot1: LineGraph
      data = int4_ds1
      expr = eta5(root.t)
      xdata = expr
      xdataexpr = root.t
      legends = COMSOL Cubic Spline Interpolation
    ptplot1: PointGraph | data = ptds2; expr = eta5(root.t); xdata = expr; xdataexpr = root.t
    plot2: LineGraph "Left Extrapolation" | data = int4_ds2; expr = eta5(root.t); xdata = expr; xdataexpr = root.t
    plot3: LineGraph "Right Extrapolation" | data = int4_ds3; expr = eta5(root.t); xdata = expr; xdataexpr = root.t
    plot4: LineGraph | data = pw1_ds1; expr = eta3(root.es.normE); legends = ROOT Double Fit of Korff Approximation
    plot5: LineGraph "Left Extrapolation 2" | data = pw2_ds2; expr = eta3(root.es.normE)
    plot6: LineGraph "Right Extrapolation 2" | data = pw2_ds3; expr = eta3(root.es.normE)
  pg38: PlotGroup1D "Probe Plot Group 38"
    tblp1: Table "Probe Table Graph 1" | table = tbl1
  pg40: PlotGroup2D "Electric Potential (es)" | data = dset6
    surf1: Surface | expr = V
  pg42: PlotGroup2D "Log Electric Field (es.normE)" | data = dset6
    surf1: Surface | expr = log(es.normE)/log(10)
    str1: Streamline | expr = {es.Ex, es.Ey}
  pg41: PlotGroup1D "Field At Center Well" | data = dset6
    lngr1: LineGraph
      data = cln15
      inputmode = linesecond
      cutmode = off
      listen = on
      expr = es.normE
      unit = V/m
      xdataexpr = y
  pg43: PlotGroup1D "Field At Center Kapton" | data = dset6
    lngr1: LineGraph
      data = cln16
      inputmode = linesecond
      cutmode = off
      listen = on
      expr = es.normE
      unit = V/m
      xdataexpr = y
  pg44: PlotGroup2D "Particle Trajectories (cpt)" | data = part1
    traj1: ParticleTrajectories | linetype = line; pointtype = point
      col1: Color "Color Expression 1" | expr = cpt.V

Exports
  img1: Image2D "Electric Potential 2D"
    size = current
    weblockratio = off
    webwidth = 800
    webheight = 600
    webresolution = 96
    printlockratio = off
    printwidth = 120
    printheight = 90
    printresolution = 300
    pngfilename = /home/piet/comsol-simulations/simulations-piet/Baby_Piet_V3_50um/FTM_V_50um_2dfieldlines_final.png
    options = on
    axes = on
  img2: Image2D "Electric Field 2D"
    size = current
    weblockratio = off
    webwidth = 800
    webheight = 600
    webresolution = 96
    printlockratio = off
    printwidth = 120
    printheight = 90
    printresolution = 300
    pngfilename = /home/piet/comsol-simulations/simulations-piet/Baby_Piet_V3_50um/FTM_E_50um_2dfieldlines_zoom.png
    options = on
    axes = on
  img15: Image1D "Electric Field 1D"
    size = current
    weblockratio = off
    webwidth = 800
    webheight = 600
    webresolution = 96
    printlockratio = off
    printwidth = 120
    printheight = 90
    printresolution = 300
    pngfilename = /home/piet/comsol-simulations/simulations-piet/Baby_Piet_V3_50um/FTM_E_50um_1dfield_sweep.png
    options = on
    axes = on
  img11: Image1D "Electric Field vs Vmesh"
    size = current
    weblockratio = off
    webwidth = 800
    webheight = 600
    webresolution = 96
    printlockratio = off
    printwidth = 120
    printheight = 90
    printresolution = 300
    pngfilename = /home/piet/comsol-simulations/simulations-piet/Baby_Piet_V3_50um/FTM_E_50um_Vmesh_Sweep_AtReadout.png
    options = on
    axes = on
  img12: Image1D "Townsend Coefficient vs Vmesh"
    size = current
    weblockratio = off
    webwidth = 800
    webheight = 600
    webresolution = 96
    printlockratio = off
    printwidth = 120
    printheight = 90
    printresolution = 300
    pngfilename = /home/piet/comsol-simulations/simulations-piet/Baby_Piet_V3_50um/FTM_n_50um_Vmesh_Sweep_AtReadout.png
    options = on
    axes = on
  img13: Image1D "Log Gain vs Vmesh"
    size = current
    weblockratio = off
    webwidth = 800
    webheight = 600
    webresolution = 96
    printlockratio = off
    printwidth = 120
    printheight = 90
    printresolution = 300
    pngfilename = /home/piet/comsol-simulations/simulations-piet/Baby_Piet_V3_50um/FTM_LogG_50um_Vmesh_Sweep_AtReadout.png
    options = on
    axes = on
  img14: Image1D "Gain vs Vmesh"
    size = current
    weblockratio = off
    webwidth = 800
    webheight = 600
    webresolution = 96
    printlockratio = off
    printwidth = 120
    printheight = 90
    printresolution = 300
    pngfilename = /home/piet/comsol-simulations/simulations-piet/Baby_Piet_V3_50um/FTM_G_50um_Vmesh_Sweep_AtReadout.png
    options = on
    axes = on
  plot1: Plot
    filename = /home/piet/comsol-simulations/simulations-piet/Baby_Piet_V4/ElectricPotential_200um_Drift_8kV_Pitch_500um_Hole_200um_Amp_50-100kV.txt
  plot2: Plot
    filename = /home/piet/comsol-simulations/simulations-piet/Baby_Piet_V4/ElectricField_200um_Drift_8kV_Pitch_500um_Hole_200um_Amp_20-120kV.txt
  plot3: Plot
    filename = /home/piet/comsol-simulations/simulations-piet/Baby_Piet_V4/ElectricField_200um_Drift_8kV_Amp_60kV_Pitch_250um_Hole_50-200um.txt