// COMSOL Multiphysics 5.1.0.234 model "SingleGEM_Piet_V2_nosolutions.mph"
// Outline of the model tree

Parameters
  h_drift = 0.1[mm]  // height drift gap
  h_transfer = 0.1[mm]  // height transfer gap
  h_Cu = 5[um]  // height Cu cladd
  h_kapton = 50[um]  // height Kapton
  h_total = h_drift+h_Cu+h_kapton+h_Cu+h_transfer  // height Model
  pitch = 140[um]  // pitch Model
  l_total = 2*pitch  // length Model
  l_hole_top = 70[um]  // top width of hole
  l_hole_bottom = 70[um]  // bottom width of hole
  l_hole_middle = 50[um]  // center width of hole
  l_kapton_top = pitch-l_hole_top  // top width of kapton
  l_kapton_bottom = pitch-l_hole_bottom  // bottom widht of kapton
  l_kapton_middle = pitch-l_hole_middle  // center width of kapton
  l_uncovered_top = 3[um]  // top naked kapton
  l_uncovered_bottom = 3[um]  // bottom naked kapton
  l_Cu_top = pitch-l_hole_top-2*l_uncovered_top  // top width Cu
  l_Cu_bottom = pitch-l_hole_bottom-2*l_uncovered_bottom  // bottom width Cu
  rho_curvature = 1[um]  // curvature radius
  E_drift = 3[kV/cm]
  E_gem = 90[kV/cm]
  E_transfer = 3[kV/cm]
  V_Drift = V_GEM_top+E_drift*h_drift  // Potential at Drift Electrode
  V_GEM_top = V_GEM_bottom+E_gem*h_kapton  // Potential GEM top
  V_GEM_bottom = E_transfer*h_transfer  // Potential GEM bottom
  V_Readout = 0[V]  // Potential at Readout
  Korff_A_Ar = 14[torr^-1][cm^-1]  // Korff Approx coeff A for Argon
  Korff_A_CO2 = 20[torr^-1][cm^-1]  // Korff Approx coeff A for CO2
  Korff_B_Ar = 180[V][cm^-1][torr^-1]  // Korff Approx coeff B for Ar
  Korff_B_CO2 = 466[V][cm^-1][torr^-1]  // Korff Approx coeff B for CO2
  Korff_A_Ar_70_CO2_30 = 0.7*Korff_A_Ar+0.3*Korff_A_CO2  // Korff Approx coeff A for Ar/CO2 70:30
  Korff_B_Ar_70_CO2_30 = 0.7*Korff_B_Ar+0.3*Korff_B_CO2  // Korff Approx coeff B for Ar/CO2 70:30
  P = 101325[Pa]  // Atmospheric Pressure
  P_CERN = 98000[Pa]
  P_BARI = 101325[Pa]
  Korff_A_Garfield_CERN_L = 3.88[m^-1][Pa^-1]  // New Korff Approx Fit for A (CERN Pressure 980mbar)
  Korff_B_Garfield_CERN_L = 101.50[V][m^-1][Pa^-1]  // New Korff Approx Fit for B (CERN Pressure 980mbar)
  Korff_A_Garfield_CERN_H = 8.05[m^-1][Pa^-1]
  Korff_B_Garfield_CERN_H = 157.22[V][m^-1][Pa^-1]
  Korff_A_Garfield_BARI_L = 3.58[m^-1][Pa^-1]
  Korff_B_Garfield_BARI_L = 98.00[V][m^-1][Pa^-1]
  Korff_A_Garfield_BARI_H = 7.93[m^-1][Pa^-1]
  Korff_B_Garfield_BARI_H = 155.48[V][m^-1][Pa^-1]

Functions
  an1: Analytic "TownsendCoefficient SAULI" | funcname = eta1; expr = Korff_A_Ar_70_CO2_30*P*exp(-Korff_B_Ar_70_CO2_30*P/es.normE); args = es.normE; fununit = m^-1
  pw1: Piecewise "TownsendCoefficient CERN"
    funcname = eta2
    arg = es.normE
    smooth = contd1
    pieces = 
      {0, 7E6, Korff_A_Garfield_CERN_L*P_CERN*exp(-Korff_B_Garfield_CERN_L*P_CERN/es.normE)}
      {7E6, 20E6, Korff_A_Garfield_CERN_H*P_CERN*exp(-Korff_B_Garfield_CERN_H*P_CERN/es.normE)}
  pw2: Piecewise "TownsendCoefficient BARI"
    funcname = eta3
    arg = es.normE
    smooth = contd1
    pieces = 
      {0, 7E6, Korff_A_Garfield_BARI_L*P_BARI*exp(-Korff_B_Garfield_BARI_L*P_BARI/es.normE)}
      {7E6, 20E6, Korff_A_Garfield_BARI_H*P_BARI*exp(-Korff_B_Garfield_BARI_H*P_BARI/es.normE)}

Couplings
  intop1: Integration on boundaries 20

Geometry
  geom1 "Geometry 1" (2D, length unit m)
    r1: Rectangle | size = {l_total, h_total}
    b1: BezierPolygon "Bézier Polygon 1"
      p = 
        {0.5*l_hole_bottom, 0.5*l_hole_bottom+l_kapton_bottom, 0.5*l_hole_middle+l_kapton_middle, 0.5*l_hole_top+l_kapton_top, 0.5*l_hole_top, 0.5*l_hole_middle, 0.5*l_hole_bottom}
        {h_transfer+h_Cu, h_transfer+h_Cu, h_transfer+h_Cu+h_kapton/2, h_transfer+h_Cu+h_kapton, h_transfer+h_Cu+h_kapton, h_transfer+h_Cu+h_kapton/2, h_transfer+h_Cu}
      degree = {1, 1, 1, 1, 1, 1}
      w = {1, 1, 1, 1, 1, 1, 1, 1, 1, 1, 1, 1}
    fil1: Fillet | point = b1(1) entities 1-6; radius = rho_curvature
    r2: Rectangle | pos = {0.5*l_hole_top+l_uncovered_top, h_transfer+h_Cu+h_kapton}; size = {l_Cu_top, h_Cu}
    fil2: Fillet | point = r2(1) entities 3, 4; radius = rho_curvature
    r3: Rectangle | pos = {0.5*l_hole_top+l_uncovered_bottom, h_transfer}; size = {l_Cu_bottom, h_Cu}
    fil3: Fillet | point = r3(1) entities 1, 2; radius = rho_curvature
    arr1: Array | input = fil1, fil2, fil3; size = {2, 1}; fullsize = {2, 1}; displ = {pitch, 0}
    b2: BezierPolygon "Bézier Polygon 2" | p = {{1.4E-4, 1.4E-4}, {2.6E-4, 0}}; degree = 1; w = {1, 1}; type = solid
    fin: Finalize "Form Union"

Materials
  mat1: Common "Copper"
    def "Basic"
      relpermeability = 1
      electricconductivity = 5.998e7[S/m]
      thermalexpansioncoefficient = 17e-6[1/K]
      heatcapacity = 385[J/(kg*K)]
      relpermittivity = 1
      density = 8700[kg/m^3]
      thermalconductivity = 400[W/(m*K)]
    Enu "Young's modulus and Poisson's ratio"
      youngsmodulus = 110e9[Pa]
      poissonsratio = 0.35
    linzRes "Linearized resistivity"
      rho0 = 1.72e-8[ohm*m]
      alpha = 0.0039[1/K]
      Tref = 298[K]
  mat2: Common "Copper" on domains 3, 4, 7, 8
    // same settings as mat1
  mat3: Common "Polyimide"
    def "Basic"
      heatcapacity = 1100[J/(kg*K)]
      density = 1300[kg/m^3]
      thermalconductivity = 0.15[W/(m*K)]
    Enu "Young's modulus and Poisson's ratio"
      youngsmodulus = 3.1e9[Pa]
  mat4: Common "Polyimide tape (Kapton H) [solid]"
    def "Basic"
      thermalconductivity = k(T[1/K])[W/(m*K)]
      heatcapacity = C(T[1/K])[J/(kg*K)]
      k: Piecewise | arg = T; extrap = constant; pieces = {5.0, 400.0, -1.82146E-15+0.0027*T^1}
      C: Piecewise
        arg = T
        extrap = constant
        pieces = 
          {4.0, 30.0, 2.809666-1.394349*T^1+0.2106639*T^2+0.004752016*T^3-3.279998E-4*T^4+4.282249E-6*T^5}
          {30.0, 300.0, -86.86946+7.816917*T^1-0.03664788*T^2+9.9128E-5*T^3-1.08441E-7*T^4}
  mat5: Common "Polyimide tape (Kapton H) [solid]" on domains 2, 6
    def "Basic"
      thermalconductivity = k(T[1/K])[W/(m*K)]
      heatcapacity = C(T[1/K])[J/(kg*K)]
      relpermittivity = 3.5
      k: Piecewise | arg = T; extrap = constant; pieces = {5.0, 400.0, -1.82146E-15+0.0027*T^1}
      C: Piecewise
        arg = T
        extrap = constant
        pieces = 
          {4.0, 30.0, 2.809666-1.394349*T^1+0.2106639*T^2+0.004752016*T^3-3.279998E-4*T^4+4.282249E-6*T^5}
          {30.0, 300.0, -86.86946+7.816917*T^1-0.03664788*T^2+9.9128E-5*T^3-1.08441E-7*T^4}
  mat6: Common "Air [gas]"
    def "Basic"
      thermalconductivity = k(T[1/K])[W/(m*K)]
      heatcapacity = C(T[1/K])[J/(kg*K)]
      density = rho_gas_2(T[1/K])[kg/m^3]
      TD = TD(T[1/K])[m^2/s]
      dynamicviscosity = eta(T[1/K])[Pa*s]
      k: Piecewise | arg = T; extrap = constant; pieces = {70.0, 1000.0, -8.404165E-4+1.107418E-4*T^1-8.635537E-8*T^2+6.31411E-11*T^3-1.88168E-14*T^4}
      C: Piecewise
        arg = T
        extrap = constant
        pieces = 
          {100.0, 375.0, 1010.97+0.0439479*T^1-2.922398E-4*T^2+6.503467E-7*T^3}
          {375.0, 1300.0, 1093.29-0.6355521*T^1+0.001633992*T^2-1.412935E-6*T^3+5.59492E-10*T^4-8.663072E-14*T^5}
          {1300.0, 3000.0, 701.0807+0.8493867*T^1-5.846487E-4*T^2+2.302436E-7*T^3-4.846758E-11*T^4+4.23502E-15*T^5}
      rho_gas_2: Piecewise "Piecewise 2a" | arg = T; extrap = constant; pieces = {80.0, 3000.0, 352.716*T^-1}
      TD: Piecewise
        arg = T
        extrap = constant
        pieces = 
          {300.0, 753.0, 1.713214E-4-1.204913E-6*T^1+2.839046E-9*T^2-1.532799E-12*T^3}
          {753.0, 873.0, 0.00416418-1.191227E-5*T^1+8.863636E-9*T^2}
      eta: Piecewise
        arg = T
        extrap = constant
        pieces = 
          {120.0, 600.0, -1.132275E-7+7.94333E-8*T^1-7.197989E-11*T^2+5.158693E-14*T^3-1.592472E-17*T^4}
          {600.0, 2150.0, 3.892629E-6+5.75387E-8*T^1-2.675811E-11*T^2+9.709691E-15*T^3-1.355541E-18*T^4}
  mat7: Common "Argon [gas]"
    def "Basic"
      thermalconductivity = k_gas_4(T[1/K])[W/(m*K)]
      heatcapacity = C_gas_2(T[1/K])[J/(kg*K)]
      HC = HC_gas_2(T[1/K])[J/(mol*K)]
      density = rho_gas_3(T[1/K])[kg/m^3]
      TD = TD(T[1/K])[m^2/s]
      dynamicviscosity = eta(T[1/K])[Pa*s]
      k_gas_4: Piecewise
        arg = T
        extrap = constant
        pieces = 
          {88.0, 340.0, -2.420719E-4+7.233846E-5*T^1-5.020862E-8*T^2+2.864443E-11*T^3}
          {340.0, 690.0, -2.46709E-4+7.367416E-5*T^1-5.22509E-8*T^2+2.297758E-11*T^3}
          {690.0, 2500.0, 0.004222052+5.576743E-5*T^1-2.632101E-8*T^2+1.050359E-11*T^3-1.587964E-15*T^4}
      C_gas_2: Piecewise
        arg = T
        extrap = constant
        pieces = 
          {100.0, 6800.0, 520.3264}
          {6800.0, 10000.0, 737.3204-0.1356916*T^1+3.349874E-5*T^2-4.069944E-9*T^3+2.423156E-13*T^4-5.615953E-18*T^5}
          {10000.0, 20000.0, 3866.452-1.384217*T^1+2.278344E-4*T^2-1.859314E-8*T^3+7.466511E-13*T^4-1.159342E-17*T^5}
      HC_gas_2: Piecewise "Piecewise 2a"
        arg = T
        extrap = constant
        pieces = 
          {100.0, 6800.0, 20.786}
          {6800.0, 10000.0, 29.45447-0.005420606*T^1+1.338208E-6*T^2-1.625861E-10*T^3+9.680023E-15*T^4-2.24346E-19*T^5}
          {10000.0, 20000.0, 154.457-0.05529671*T^1+9.101531E-6*T^2-7.427587E-10*T^3+2.982722E-14*T^4-4.631341E-19*T^5}
      rho_gas_3: Piecewise | arg = T; extrap = constant; pieces = {87.0, 3000.0, 522.2077*T^-1}
      TD: Piecewise
        arg = T
        extrap = constant
        pieces = 
          {50.0, 313.0, 1.473381E-7-4.058428E-9*T^1+2.637005E-10*T^2-1.823646E-13*T^3+8.210684E-17*T^4}
          {313.0, 3273.0, -7.696469E-6+5.101993E-8*T^1+1.233721E-10*T^2-1.523237E-14*T^3+1.553406E-18*T^4}
      eta: Piecewise
        arg = T
        extrap = constant
        pieces = 
          {50.0, 313.0, 1.543468E-6+4.229844E-8*T^1+3.145939E-10*T^2-1.058698E-12*T^3+1.095469E-15*T^4}
          {313.0, 3273.0, 2.823345E-6+7.51229E-8*T^1-3.008134E-11*T^2+8.881353E-15*T^3-1.007569E-18*T^4}
  mat8: Common "CO2 [liquid]"
    def "Basic"
      dL = (dL_liquid_2(T[1/K])-dL_liquid_2(Tempref[1/K]))/(1+dL_liquid_2(Tempref[1/K]))
      thermalexpansioncoefficient = (alpha_liquid_2(T[1/K])[1/K]+(Tempref-216[K])*if(abs(T-Tempref)>1e-3,(alpha_liquid_2(T[1/K])[1/K]-alpha_liquid_2(Tempref[1/K])[1/K])/(T-Tempref),d(alpha_liquid_2(T[1/K]),T)[1/K]))/(1+alpha_liquid_2(Tempref[1/K])[1/K]*(Tempref-216[K]))
      density = rho_liquid_2(T[1/K])[kg/m^3]
      dL_liquid_2: Piecewise
        arg = T
        extrap = constant
        pieces = 
          {216.3, 299.6, -70.83728+1.449804*T^1-0.01187544*T^2+4.863399E-5*T^3-9.95729E-8*T^4+8.160568E-11*T^5}
          {299.6, 304.0, 53972.53-742.2713*T^1+3.827683*T^2-0.008771635*T^3+7.537251E-6*T^4}
      alpha_liquid_2: Piecewise "Piecewise 2a"
        arg = T
        extrap = constant
        pieces = 
          {216.3, 299.6, 0.3880141-0.006327308*T^1+3.946987E-5*T^2-1.140095E-7*T^3+1.416745E-10*T^4-4.489996E-14*T^5}
          {299.6, 304.0, -56.31806+0.5748222*T^1-0.001955519*T^2+2.217425E-6*T^3}
      rho_liquid_2: Piecewise "Piecewise 2b"
        arg = T
        extrap = constant
        pieces = 
          {216.3, 300.0, 343707.2-6886.421*T^1+55.32999*T^2-0.2219696*T^3+4.445241E-4*T^4-3.556699E-7*T^5}
          {300.0, 304.0, -6.024935E7+828916.2*T^1-4276.1*T^2+9.803052*T^3-0.008426944*T^4}
  mat9: Common "Air [gas]" on domains 1, 5
    def "Basic"
      thermalconductivity = k(T[1/K])[W/(m*K)]
      heatcapacity = C(T[1/K])[J/(kg*K)]
      density = rho_gas_2(T[1/K])[kg/m^3]
      TD = TD(T[1/K])[m^2/s]
      dynamicviscosity = eta(T[1/K])[Pa*s]
      relpermittivity = 1.00058986
      k: Piecewise | arg = T; extrap = constant; pieces = {70.0, 1000.0, -8.404165E-4+1.107418E-4*T^1-8.635537E-8*T^2+6.31411E-11*T^3-1.88168E-14*T^4}
      C: Piecewise
        arg = T
        extrap = constant
        pieces = 
          {100.0, 375.0, 1010.97+0.0439479*T^1-2.922398E-4*T^2+6.503467E-7*T^3}
          {375.0, 1300.0, 1093.29-0.6355521*T^1+0.001633992*T^2-1.412935E-6*T^3+5.59492E-10*T^4-8.663072E-14*T^5}
          {1300.0, 3000.0, 701.0807+0.8493867*T^1-5.846487E-4*T^2+2.302436E-7*T^3-4.846758E-11*T^4+4.23502E-15*T^5}
      rho_gas_2: Piecewise "Piecewise 2a" | arg = T; extrap = constant; pieces = {80.0, 3000.0, 352.716*T^-1}
      TD: Piecewise
        arg = T
        extrap = constant
        pieces = 
          {300.0, 753.0, 1.713214E-4-1.204913E-6*T^1+2.839046E-9*T^2-1.532799E-12*T^3}
          {753.0, 873.0, 0.00416418-1.191227E-5*T^1+8.863636E-9*T^2}
      eta: Piecewise
        arg = T
        extrap = constant
        pieces = 
          {120.0, 600.0, -1.132275E-7+7.94333E-8*T^1-7.197989E-11*T^2+5.158693E-14*T^3-1.592472E-17*T^4}
          {600.0, 2150.0, 3.892629E-6+5.75387E-8*T^1-2.675811E-11*T^2+9.709691E-15*T^3-1.355541E-18*T^4}

Physics
  es: Electrostatics on domains 1, 5
    dependent variable V
    ccn1: ChargeConservation (default)
    zc1: ZeroCharge (default)
    init1: init "Initial Values 1" (default)
    pot1: ElectricPotential "V Readout" on boundaries 2, 21 | V0 = V_Readout
    pot2: ElectricPotential "V Drift" on boundaries 3, 22 | V0 = V_Drift
    pot3: ElectricPotential "V GEM Bottom" on boundaries 8, 9, 12, 14, 27, 28, 31, 33 | V0 = V_GEM_bottom
    pot4: ElectricPotential "V GEM Top" on boundaries 10, 11, 13, 16, 29, 30, 32, 35 | V0 = V_GEM_top
    pc1: PeriodicCondition on boundaries 1, 39

Mesh
  mesh1 "Mesh 1"
    size: MeshSizeDefault | hmax = 1.88E-5; hmin = 8.4E-8; hcurve = 0.3; hnarrow = 1; hgrad = 1.3; hauto = 5
    ftri2: FreeTri "Free Triangular 2" on remaining entities
      size1: Size on boundaries 20 | hauto = 1

Studies
  std1 "Study 1"
    param: Parametric "Parametric Sweep" | pname = E_gem; plistarr = range(90,10,120); punit = kV/cm
    stat: Stationary

Solver configurations
  sol1 "Solution 1" (study std1)
    v1: Variables "Dependent Variables 1"
    s1: Stationary "Stationary Solver 1"
      dDef: Direct
      p1: Parametric
        sweeptype = sparse
        pname = E_gem
        plistarr = range(90,10,120)
        punit = kV/cm
        pcontinuationmode = no
      fc1: FullyCoupled | linsolver = dDef

Datasets
  dset1: Solution | solution = sol1
  cln1: CutLine2D | data = dset1; method = twopoint; genpoints = {{1.39999E-4, 0}, {1.39999E-4, 2.59999E-4}}
  cln2: CutLine2D | data = dset1; method = twopoint; genpoints = {{1.55E-4, 0}, {1.55E-4, 2.6E-4}}
  an1_ds1: Grid1D | source = function; function = all; par1 = es.normE; parmin1 = 0; parmax1 = 1
  pw2_ds1: Grid1D "Grid 1D 1a" | source = function; function = all; par1 = es.normE; parmin1 = 0; parmax1 = 20000000
  pw2_ds2: Grid1D | source = function; function = all; par1 = es.normE; parmin1 = -2000000; parmax1 = 0
  pw2_ds3: Grid1D | source = function; function = all; par1 = es.normE; parmin1 = 20000000; parmax1 = 22000000

Plots
  pg1: PlotGroup2D "Electric Potential (es)" | data = dset1
    surf1: Surface | expr = V
    str1: Streamline on all boundaries | expr = {es.Ex, es.Ey}; selnumber = 200
  pg4: PlotGroup2D "Electric Field" | data = dset1
    surf1: Surface | expr = es.normE
    str1: Streamline on all boundaries | expr = {es.Ex, es.Ey}; selnumber = 200
  pg2: PlotGroup1D "Electric Potential 1D [Center]" | data = dset1
    lngr1: LineGraph | data = cln1; cutmode = off; listen = on; expr = V; xdataexpr = y
  pg3: PlotGroup1D "Electric Field 1D [Center]" | data = dset1
    lngr1: LineGraph | data = cln1; cutmode = off; listen = on; expr = es.normE; descr = Electric field; xdataexpr = y
  pg5: PlotGroup2D "Townsend Coefficient CERN" | data = dset1
    surf1: Surface | expr = eta2(es.normE)
  pg6: PlotGroup1D "Townsend Coefficient 1D CERN" | data = cln1
    lngr1: LineGraph | expr = eta2(es.normE); descr = Townsend Coefficient; xdataexpr = y
  pg7: PlotGroup1D "Log Gain 1D CERN" | data = dset1
    lngr1: LineGraph | data = cln1; expr = intop1(eta2(es.normE)*(dest(y)<y))/log(10); descr = Log(Gain); xdataexpr = y
  pg8: PlotGroup1D "Gain 1D CERN" | data = dset1
    lngr2: LineGraph | data = cln1; expr = exp(intop1(eta2(es.normE)*(dest(y)<y))); descr = Gain; xdataexpr = y
  pg16: PlotGroup2D "Townsend Coefficient BARI" | data = dset1
    surf1: Surface | expr = eta3(es.normE)
  pg17: PlotGroup1D "Townsend Coefficient 1D BARI" | data = cln1
    lngr1: LineGraph | expr = eta3(es.normE); descr = Townsend Coefficient; xdataexpr = y
  pg18: PlotGroup1D "Log Gain 1D BARI" | data = dset1
    lngr1: LineGraph | data = cln1; expr = intop1(eta3(es.normE)*(dest(y)<y))/log(10); descr = Log(Gain); xdataexpr = y
  pg19: PlotGroup1D "Gain 1D BARI" | data = dset1
    lngr2: LineGraph | data = cln1; expr = exp(intop1(eta3(es.normE)*(dest(y)<y))); descr = Gain; xdataexpr = y
  pg9: PlotGroup2D "Electric Field :: Ey" | data = dset1
    con1: Contour | expr = es.Ey
  pg11: PlotGroup2D "Electric Field :: Ex" | data = dset1
    con1: Contour | expr = es.Ex
  pg12: PlotGroup1D "E Field Ey 1D [Center]" | data = dset1
    lngr1: LineGraph | data = cln1; cutmode = off; listen = on; expr = es.Ey; descr = Electric field; xdataexpr = y
  pg13: PlotGroup1D "E Field Ex 1D [Center]" | data = dset1
    lngr1: LineGraph | data = cln1; cutmode = off; listen = on; expr = es.Ex; descr = Electric field; xdataexpr = y
  pg14: PlotGroup1D "E Field Ey 1D [Center+15um]" | data = cln2
    lngr1: LineGraph | cutmode = off; listen = on; expr = es.Ey; descr = Electric field; xdataexpr = y
  pg15: PlotGroup1D "E Field Ex 1D [Center+15um]" | data = cln2
    lngr1: LineGraph | cutmode = off; listen = on; expr = es.Ex; descr = Electric field; xdataexpr = y
  pg20: PlotGroup1D "TownsendCoefficient Comparison" | data = dset1
    lngr1: LineGraph | data = pw2_ds1; expr = eta2(root.es.normE); legends = CERN (980 mbar)
    lngr2: LineGraph | data = pw2_ds1; expr = eta3(root.es.normE); legends = BARI (1013 mbar)

Exports
  img1: Image2D "2D Image 1"
    size = current
    weblockratio = off
    webwidth = 800
    webheight = 600
    webresolution = 96
    printlockratio = off
    printwidth = 120
    printheight = 90
    printresolution = 300
    pngfilename = /home/piet/comsol-simulations/simulations-piet/SingleGEM_V1/Potential_120kVcm.png
    options = on
    axes = on
  img2: Image2D "2D Image 2"
    size = current
    weblockratio = off
    webwidth = 800
    webheight = 600
    webresolution = 96
    printlockratio = off
    printwidth = 120
    printheight = 90
    printresolution = 300
    pngfilename = /home/piet/comsol-simulations/simulations-piet/SingleGEM_V1/EField_120kVcm.png
    options = on
    axes = on
  img3: Image1D "1D Image 3"
    size = current
    weblockratio = off
    webwidth = 800
    webheight = 600
    webresolution = 96
    printlockratio = off
    printwidth = 120
    printheight = 90
    printresolution = 300
    pngfilename = /home/piet/comsol-simulations/simulations-piet/SingleGEM_V1/Potential_Scan_CenterHole.png
    options = on
    axes = on
  img4: Image1D "1D Image 4"
    size = current
    weblockratio = off
    webwidth = 800
    webheight = 600
    webresolution = 96
    printlockratio = off
    printwidth = 120
    printheight = 90
    printresolution = 300
    pngfilename = /home/piet/comsol-simulations/simulations-piet/SingleGEM_V1/EField_Scan_CenterHole.png
    options = on
    axes = on
  img5: Image1D "1D Image 5"
    size = current
    weblockratio = off
    webwidth = 800
    webheight = 600
    webresolution = 96
    printlockratio = off
    printwidth = 120
    printheight = 90
    printresolution = 300
    pngfilename = /home/piet/comsol-simulations/simulations-piet/SingleGEM_V1/Townsend_Scan_CenterHole_980mbar.png
    options = on
    axes = on
  img6: Image1D "1D Image 6"
    size = current
    weblockratio = off
    webwidth = 800
    webheight = 600
    webresolution = 96
    printlockratio = off
    printwidth = 120
    printheight = 90
    printresolution = 300
    pngfilename = /home/piet/comsol-simulations/simulations-piet/SingleGEM_V1/LogGain_Scan_CenterHole_980mbar.png
    options = on
    axes = on
  img7: Image1D "1D Image 7"
    size = current
    weblockratio = off
    webwidth = 800
    webheight = 600
    webresolution = 96
    printlockratio = off
    printwidth = 120
    printheight = 90
    printresolution = 300
    pngfilename = /home/piet/comsol-simulations/simulations-piet/SingleGEM_V1/Gain_Scan_CenterHole_980mbar.png
    options = on
    axes = on
  img8: Image1D "1D Image 8"
    size = current
    weblockratio = off
    webwidth = 800
    webheight = 600
    webresolution = 96
    printlockratio = off
    printwidth = 120
    printheight = 90
    printresolution = 300
    pngfilename = /home/piet/comsol-simulations/simulations-piet/SingleGEM_V1/Townsend_Scan_CenterHole_1013mbar.png
    options = on
    axes = on
  img9: Image1D "1D Image 9"
    size = current
    weblockratio = off
    webwidth = 800
    webheight = 600
    webresolution = 96
    printlockratio = off
    printwidth = 120
    printheight = 90
    printresolution = 300
    pngfilename = /home/piet/comsol-simulations/simulations-piet/SingleGEM_V1/LogGain_Scan_CenterHole_1013mbar.png
    options = on
    axes = on
  img10: Image1D "1D Image 10"
    size = current
    weblockratio = off
    webwidth = 800
    webheight = 600
    webresolution = 96
    printlockratio = off
    printwidth = 120
    printheight = 90
    printresolution = 300
    pngfilename = /home/piet/comsol-simulations/simulations-piet/SingleGEM_V1/Gain_Scan_CenterHole_1013mbar.png
    options = on
    axes = on